// Model for the mocap tutorial

Main = {

  // The actual body model goes in this folder
  AnyFolder MyModel = {

    // Global Reference Frame
    AnyFixedRefFrame GlobalRef = {
    };  // Global reference frame

    AnySeg Pendulum = {
      Mass = 1;
      Jii = {1, 0.01, 1}/15;
      AnyRefNode Origin = {
        sRel = {0, 0.5, 0};
      };
      AnyRefNode P1 = {
        sRel = {0, -0.5, 0};
      };
      AnyDrawSeg drw = {};
    };

    AnyRevoluteJoint Joint = {
      AnyRefFrame &Ground = .GlobalRef;
      AnyRefFrame &Pendulum = .Pendulum.Origin;
    };

    AnyInputC3D C3D = {
      FileName = "pendulum.c3d";
      //ReadAllDataOnOff = On;
      //TruncateExtraCharsInNamesOnOff = On;
      //PointsScaleFactor = 1;
      ConstructModelOnOff = Off;
      //MarkerUseAllPointsOnOff = Off;
      //MarkerUseCamMaskOnOff = On;
      //MarkerIndices = ;
      //MarkerLabels = ;
      MarkerFilterIndex = 0;
      //ProcessedDataFilterIndex = 0;
      //AnalogFilterIndex = -1;
      Filter =
      {
        //      z0 = {0,0};
        AutomaticInitialConditionOnOff = On;
        FilterForwardBackwardOnOff = On;
        N = 8;
        //      W = ;
        //      Fs = 0;
        Fc = {2};
        Type = LowPass;
      };
      //WriteMarkerDataToFilesOnOff = Off;
      //MarkerScaleXYZ = {0.025, 0.025, 0.025};
      //MarkerRGB = {0.65, 0.65, 0.65};
      //MarkerDrawOnOff = On;
      //MarkerInterPolType = Bspline;
      //MarkerBsplineOrder = 8;
    };
    //
    //    AnyKinEqSimpleDriver tmp = {
    //      AnyRevoluteJoint &jnt = .Joint;
    //      DriverVel = {pi};
    //    };

    //    AnyKinMotion Driver = {
    //      //MeasureOrganizer = ;
    //      //CType = ;
    //      AnyKinLinear lin = {
    //        AnyRefFrame &Marker = ..Pendulum.P1;
    //      };
    //      AnyParamFun &fun = .C3D.Points.Markers.L000.PosInterpol;
    //    };

    AnyKinMotion C3Dmotion = {
      //MeasureOrganizer = ;
      //CType = ;
      AnyKinLinear lin = {
        AnyRefFrame &Marker = ..Pendulum.P1;
      };
      AnyParamFun &Trajectory = Main.MyModel.C3D.Points.Markers.L000.PosInterpol;
    };
  }; // MyModel

  // The study: Operations to be performed on the model
  AnyBodyStudy MyStudy = {
    AnyFolder &Model = .MyModel;
    Gravity = {0.0, -9.81, 0.0};

    AnyIntVar FirstFrame = Main.MyModel.C3D.Header.FirstFrameNo;
    AnyIntVar LastFrame = Main.MyModel.C3D.Header.LastFrameNo;
    tStart = FirstFrame/Main.MyModel.C3D.Header.VideoFrameRate+2*Kinematics.ApproxVelAccPerturb;
    tEnd = LastFrame/Main.MyModel.C3D.Header.VideoFrameRate-2*Kinematics.ApproxVelAccPerturb;

    //    tStart = 0.05;
    //    tEnd = 9.95;
    InitialConditions.SolverType = KinSolOverDeterminate;
    Kinematics.SolverType = KinSolOverDeterminate;
  };

};  // Main
